Площа_Вписаного_Круга/Площа_Квадрата == πr^2/(2*r)^2 == π/4
As == a^2
Ac == πa^2
Ac/As == πa^2/a^2 == π
I == integral(φ(x), x = a .. b)
M*[φ(x)] == integral(φ(x)*f(x), x = a .. b) == 1/(b - a)*integral(φ(x), x = a .. b)
integral(φ(x), x = a .. b) == (b - a)*M*[φ(x)]
σ^2 == integral(φ^2*x*f(x), x = a .. b) - (M*[φ(X)])^2
S == sum(u[i]^2/N, i = 1 .. N) - sum(u[i]/N, i = 1 .. N)^2
I[1]^※ == (b - a)*sum(φ(x[i]), i = 1 .. N)/N
1/(b - a)*integral(□, x = a .. x[i]) == r[i]
S == 1/(N - 1)*(sum(u[i]^2/N, i = 1 .. N) - sum(u[i]/N, i = 1 .. N)^2/N)
I == integral(x + 1, x = 1 .. 3)
I[1]^※ == (3 - 1)*sum(x[i] + 1, i = 1 .. 10)/10
x[i] == a
sum(φ(x[i]), i = 1 .. 10) == 29.834
I[1]^※ == 2*29.834/10 == 5.967
I == integral(x + 1, x = 1 .. 3) == 6
|6 - 5.967| = 0.033
D*[X] == (3 - 1)*2/12 == 1/3
σ^2 == D*[X + 1] == D*[X] == 1/3
N == t^2*σ^2/ε^2 == 1.96^2*1/3/0.1^2 == 128
I == integral(cosx, x = 0 .. π/2)
σ^2 == π/2*integral(cos^2*x, x = 0 .. π/2) - (π/2*integral(cosx, x = 0 .. π/2))^2 == 0.09
N == t^2*σ^2/ε^2 == 1.96^2*0.09/0.1^2 == 35
