k := 9 - 5
α := 0.2*k
β := α
ORIGIN := 1
N := 4
onesDiagonal := 1
X := [0; 0; 0; 0]
matrix := [
    8.30, 2.62 + α, 4.10, 1.90;
    3.92, 8.45, 8.78 - α, 2.46;
    3.77, 7.21 + α, 8.04, 2.28;
    2.21, 3.65 - α, 1.69, 6.99
] = [8.3, 3.42, 4.1, 1.9; 3.92, 8.45, 7.98, 2.46; 3.77, 8.01, 8.04, 2.28; 2.21, 2.85, 1.69, 6.99]
rightPart := [-10.65 + β; 12.21; 15.45 - β; -8.35] = [-9.85; 12.21; 14.65; -8.35]
extenededMatrix := augment(matrix, rightPart)
extenededMatrix = [
    8.3, 3.42, 4.1, 1.9, -9.85;
    3.92, 8.45, 7.98, 2.46, 12.21;
    3.77, 8.01, 8.04, 2.28, 14.65;
    2.21, 2.85, 1.69, 6.99, -8.35
]
elimination(matrix) :=
    for i ∈ 1 .. N - 1
        for j ∈ i + 1 .. N
            if matrix[j, i] == 0
                continue
            topElement ← matrix[i, i]
            bottomElement ← matrix[j, i]
            multiplier ← topElement/bottomElement
            for k ∈ i .. N + 1
                matrix[j, k] ← matrix[i, k] - (matrix[j, k]*multiplier)
    matrix
eliminatedMatrix := elimination(extenededMatrix) = [
    8.3, 3.42, 4.1, 1.9, -9.85;
    0, -14.4716, -12.7964, -3.30867, -35.7028;
    0, 0, 1.05011, -0.132679, 7.16124;
    0, 0, 0, 5.54846, -2.72498
]
rowEchelon(matrix) :=
    if onesDiagonal
        for i ∈ 1 .. N
            for j ∈ 1 .. N
                if i == j
                    if matrix[j, i] == 0
                        continue
                    topElement ← 1
                    bottomElement ← matrix[j, i]
                    multiplier ← topElement/bottomElement
                    for k ∈ i .. N + 1
                        matrix[j, k] ← matrix[j, k]*multiplier
    matrix
eliminatedMatrix := rowEchelon(eliminatedMatrix) = [
    1, 0.412048, 0.493976, 0.228916, -1.18675;
    0, 1, 0.884245, 0.228632, 2.4671;
    0, 0, 1, -0.126348, 6.81953;
    0, 0, 0, 1, -0.491124
]
tempColumn := eliminatedMatrix[:, 5]
eliminatedMatrix := submatrix(eliminatedMatrix, 1, 4, 1, 4)
tempColumn = [-1.18675; 2.4671; 6.81953; -0.491124]
eliminatedMatrix = [1, 0.412048, 0.493976, 0.228916; 0, 1, 0.884245, 0.228632; 0, 0, 1, -0.126348; 0, 0, 0, 1]
X := lsolve(eliminatedMatrix, tempColumn)
X = [-3.01308; -3.39588; 6.75747; -0.491124]
r := rightPart - (matrix*X)
Z := 10^-4 - 10^-6
r = [1.77636e-15; 0; 0; 7.10543e-15]
x := [0.000009; -0.000012; -0.000011; -0.000003]
xm := r
Z = 9.9e-5
δ := sqrt(1/N*sum((x[k] - xm[k])^2, k = 1 .. N))
δ = 9.42072e-6
