ORIGIN := 1  # first method (not mine)(I don't use it)(I use another)
A := [3, -2, 5, 0; 4, 5, 8, 1; 1, 1, 2, 1; 2, 7, 6, 5]
RHS := [2; 4; 5; 7]
n := rows(A)
n = 4
C := augment(A, RHS)
C = [3, -2, 5, 0, 2; 4, 5, 8, 1, 4; 1, 1, 2, 1, 5; 2, 7, 6, 5, 7]
step := 1 .. n - 1
forward_elimination(step) :=
    C ← C
    for k ∈ 1 .. n - 1
        for i ∈ (k + 1) .. n
            multiplier ← C[i, k]/C[k, k]
            for j ∈ k .. n + 1
                C[i, j] ← C[i, j] - multiplier*C[k, j]
            U[k] ← C
    U[step]
forward_elimination(step) = [
    [
        3, -2, 5, 0, 2;
        0, 7.66667, 1.33333, 1, 1.33333;
        0, 1.66667, 0.333333, 1, 4.33333;
        0, 8.33333, 2.66667, 5, 5.66667
    ];
    [
        3, -2, 5, 0, 2;
        0, 7.66667, 1.33333, 1, 1.33333;
        0, 0, 0.0434783, 0.782609, 4.04348;
        0, 0, 1.21739, 3.91304, 4.21739
    ];
    [
        3, -2, 5, 0, 2;
        0, 7.66667, 1.33333, 1, 1.33333;
        0, 0, 0.0434783, 0.782609, 4.04348;
        0, 0, 0, -18, -109
    ]
]
upper_triangular := submatrix(forward_elimination(n - 1), 1, n, 1, n)
upper_triangular = [3, -2, 5, 0; 0, 7.66667, 1.33333, 1; 0, 0, 0.0434783, 0.782609; 0, 0, 0, -18]
RHSnew := submatrix(forward_elimination(n - 1), 1, n, n + 1, n + 1)
RHSnew = [2; 1.33333; 4.04348; -109]
back_substitution :=
    a ← upper_triangular
    rhs ← RHSnew
    x[n] ← rhs[n]/a[n, n]
    for i ∈ n - 1, n - 2 .. 1
        sum ← 0
        for j ∈ n - 1, n - 2 .. 1
            sum ← sum + a[i, j]*x[j]
        x[i] ← (rhs[i] - sum)/a[i, i]
    x
X := back_substitution
X = [-165; -16; 93; 6.05556]
exatsoln := lsolve(A, RHS)
exatsoln = [28.7778; 2.16667; -16; 6.05556]
matrix := [3, -2, 5, 0, 2; 4, 5, 8, 1, 4; 1, 1, 2, 1, 5; 2, 7, 6, 5, 7]
N := 4
