ORIGIN := 1
matrix := [3, -2, 5, 0; 4, 5, 8, 1; 1, 1, 2, 1; 2, 7, 6, 5]
rightPart := [2; 4; 5; 7]
X := [0; 0; 0; 0]
N := 4
onesDiagonal := 1
extenededMatrix := augment(matrix, rightPart)
extenededMatrix = [3, -2, 5, 0, 2; 4, 5, 8, 1, 4; 1, 1, 2, 1, 5; 2, 7, 6, 5, 7]
elimination(matrix) :=
    for i ∈ 1 .. N - 1
        for j ∈ i + 1 .. N
            if matrix[j, i] == 0
                continue
            topElement ← matrix[i, i]
            bottomElement ← matrix[j, i]
            multiplier ← topElement/bottomElement
            for k ∈ i .. N + 1
                matrix[j, k] ← matrix[i, k] - (matrix[j, k]*multiplier)
    matrix
eliminatedMatrix := elimination(extenededMatrix) = [3, -2, 5, 0, 2; 0, -5.75, -1, -0.75, -1; 0, 0, 0.15, 2.7, 13.95; 0, 0, 0, 2.21786, 13.4304]
rowEchelon(matrix) :=
    if onesDiagonal
        for i ∈ 1 .. N
            for j ∈ 1 .. N
                if i == j
                    if matrix[j, i] == 0
                        continue
                    topElement ← 1
                    bottomElement ← matrix[j, i]
                    multiplier ← topElement/bottomElement
                    for k ∈ i .. N + 1
                        matrix[j, k] ← matrix[j, k]*multiplier
    matrix
eliminatedMatrix := rowEchelon(eliminatedMatrix) = [
    1, -0.666667, 1.66667, 0, 0.666667;
    0, 1, 0.173913, 0.130435, 0.173913;
    0, 0, 1, 18, 93;
    0, 0, 0, 1, 6.05556
]
tempColumn := eliminatedMatrix[:, 5]
eliminatedMatrix := submatrix(eliminatedMatrix, 1, 4, 1, 4)
tempColumn = [0.666667; 0.173913; 93; 6.05556]
eliminatedMatrix = [1, -0.666667, 1.66667, 0; 0, 1, 0.173913, 0.130435; 0, 0, 1, 18; 0, 0, 0, 1]
solution := lsolve(eliminatedMatrix, tempColumn)
solution = [28.7778; 2.16667; -16; 6.05556]
r := rightPart - (matrix*solution)
Z := 10^-4 - 10^-6
r = [0; 1.59872e-14; 1.77636e-15; 7.10543e-15]
x := [-0.000019; -0.00001; -0.000003; 0.000012]
xm := r
Z = 9.9e-5
δ := sqrt(1/N*sum((x[k] - xm[k])^2, k = 1 .. N))
δ = 1.23895e-5
