k := 3*(3 - 4) + 9 = 6
t := 9
a := 0.11*t = 0.99
b := 0.02*k = 0.12
g := b
d := 0.015*t = 0.135
ORIGIN := 1
matrix := [
    6.26 + a, 1.10 - b, 0.97 + g, 1.24 - d;
    1.10 - b, 4.16 - a, 1.30, 0.16;
    0.97 + g, 1.30, 5.44 + a, 2.10;
    1.24 - d, 0.16, 2.10, 6.1 - a
] = [7.25, 0.98, 1.09, 1.105; 0.98, 3.17, 1.3, 0.16; 1.09, 1.3, 6.43, 2.1; 1.105, 0.16, 2.1, 5.11]
N := 4
fMatrix := [21.96, -166.59148, 516.81412, -552.28401; 1, 0, 0, 0; 0, 1, 0, 0; 0, 0, 1, 0]
# Знаходжу коефіцієнти для polyroots
v := λ^4 - fMatrix[1, 1]*λ^3 - fMatrix[1, 2]*λ^2 - fMatrix[1, 3]*λ - fMatrix[1, 4] coeffs, λ → [552.28401; -516.81412; 166.59148; -21.96; 1.0] = [552.284; -516.814; 166.591; -21.96; 1]
# Розв'язую характеристичне рівняння
r := polyroots(v) = [2.42737; 3.94118; 6.05117; 9.54028]
# Знаходжу власні вектори матриці Р
y1 := [r[1]^3; r[1]^2; r[1]^1; r[1]^0] = [14.3023; 5.89211; 2.42737; 1]
y2 := [r[2]^3; r[2]^2; r[2]^1; r[2]^0] = [61.2179; 15.5329; 3.94118; 1]
y3 := [r[3]^3; r[3]^2; r[3]^1; r[3]^0] = [221.574; 36.6167; 6.05117; 1]
y4 := [r[4]^3; r[4]^2; r[4]^1; r[4]^0] = [868.327; 91.0169; 9.54028; 1]
# Вписую матрицю подібності S
SMatrix := [
    0.11862, -1.90005, 8.75301, -12.21815;
    -0.09719, 1.87099, -11.00813, 19.63477;
    -0.05501, 0.85724, -3.29084, 2.49976;
    0, 0, 0, 1
]
# Знаходжу власні вектори матриці A (matrix)
x1 := SMatrix*y1 = [-0.470146; 2.54803; -1.22413; 1]
x2 := SMatrix*y2 = [0.0274257; -0.638124; -0.52221; 1]
x3 := SMatrix*y3 = [-2.54262; -0.00263153; 1.78683; 1]
x4 := SMatrix*y4 = [1.35223; 0.513206; 1.36092; 1]
# Порівнюю Результати
# Множу власний вектор матриці matrix на матрицю matrix
result1_1 := matrix*x1 = [-1.14079; 6.18515; -2.9712; 2.42749]
result1_2 := matrix*x2 = [0.109266; -2.51485; -2.05748; 3.94156]
result1_3 := matrix*x3 = [-15.3839; -0.017231; 10.8144; 6.05233]
result1_4 := matrix*x4 = [12.895; 4.88124; 12.9918; 9.54425]
# Множу власний вектор матриці matrix на власний вектор матриці P
result2_1 := y1[3]*x1 = [-1.14122; 6.18502; -2.97142; 2.42737]
result2_2 := y2[3]*x2 = [0.10809; -2.51496; -2.05812; 3.94118]
result2_3 := y3[3]*x3 = [-15.3858; -0.0159238; 10.8124; 6.05117]
result2_4 := y4[3]*x4 = [12.9007; 4.89613; 12.9835; 9.54028]
# Різниці результатів
δ1 := sqrt(1/N*sum((result2_1[k] - result1_1[k])^2, k = 1 .. N))
δ2 := sqrt(1/N*sum((result2_2[k] - result1_2[k])^2, k = 1 .. N))
δ1 = 0.000259801
δ2 = 0.000700416
δ3 := sqrt(1/N*sum((result2_3[k] - result1_3[k])^2, k = 1 .. N))
δ4 := sqrt(1/N*sum((result2_4[k] - result1_4[k])^2, k = 1 .. N))
δ3 = 0.00163935
δ4 = 0.00918924
