# Worksheet setting: ORIGIN = 1
# Задаю початкові значення
k := 9 - 1
x1 := -5 + k = 3
x2 := -3 + k = 5
x3 := -1 + k = 7
x4 := 1 + k = 9
x5 := 3 + k = 11
α := 3
f(x) := sin(α/2*x) + nthroot(x*α, 3)
y1 := f(x1) = 1.10255
y2 := f(x2) = 3.40421
y3 := f(x3) = 1.87923
y4 := f(x4) = 3.80378
y5 := f(x5) = 2.49575
ORIGIN := 1
# Задаю крок
x := [x1; x2; x3; x4; x5]
y := [y1; y2; y3; y4; y5]
step := 0.05
v := x1, x1 + step .. x5
# Виводжу графік функції
# [plot: f(v), f(x) vs v, x]
# Перевіряю поліном Лагранжа
temp1(z) := y1*((z - 5)/(3 - 5))*((z - 7)/(3 - 7))*((z - 9)/(3 - 9))*((z - 11)/(3 - 11))
temp2(z) := y2*((z - 3)/(5 - 3))*((z - 7)/(5 - 7))*((z - 9)/(5 - 9))*((z - 11)/(5 - 11))
temp3(z) := y3*((z - 3)/(7 - 3))*((z - 5)/(7 - 5))*((z - 9)/(7 - 9))*((z - 11)/(7 - 11))
temp4(z) := y4*((z - 3)/(9 - 3))*((z - 5)/(9 - 5))*((z - 7)/(9 - 7))*((z - 11)/(9 - 11))
temp5(z) := y5*((z - 3)/(11 - 3))*((z - 5)/(11 - 5))*((z - 7)/(11 - 7))*((z - 9)/(11 - 9))
polynomial(z) := temp1(z) + temp2(z) + temp3(z) + temp4(z) + temp5(z) simplify → -0.0363497727061*z^4 + 1.02398166214*z^3 - 10.2401901829*z^2 + 42.7843873673*z - 59.792070039
# Перевіряю похибку без закруглення та з ним
|f(x1) - polynomial(x1)| = 2.4869e-14
|f(x2) - polynomial(x2)| = 3.15303e-14
|f(x3) - polynomial(x3)| = 6.03961e-14
|f(x4) - polynomial(x4)| = 1.72307e-13
|f(x5) - polynomial(x5)| = 1.43885e-13
polynomialWithRounding(z) := -0.03634*z^4 + 1.02398*z^3 - 10.24019*z^2 + 42.78438*z - 59.79207
|f(x1) - polynomialWithRounding(x1)| = 0.000726295
|f(x2) - polynomialWithRounding(x2)| = 0.00586795
|f(x3) - polynomialWithRounding(x3)| = 0.0228516
|f(x4) - polynomialWithRounding(x4)| = 0.0628556
|f(x5) - polynomialWithRounding(x5)| = 0.140811
polynomial(x1) = 1.10255
polynomial(x3) = 1.87923
polynomial(x5) = 2.49575
polynomial(x2) = 3.40421
polynomial(x4) = 3.80378
# Порівняльний графік функції та інтерполяційного поліному
# [plot: f(v), polynomial(v), f(x) vs v, x]
# Приклад роботи різних функцій
exampleS1 := lspline(x, y)
exampleS2 := pspline(x, y)
exampleS3 := cspline(x, y)
A1(v) := interp(exampleS1, x, y, v)
A2(v) := interp(exampleS2, x, y, v)
A3(v) := interp(exampleS3, x, y, v)
A1(3) = 1.10255
A2(3) = 1.10255
A3(3) = 1.10255
# [plot: A1(v), A2(v), A3(v), f(x) vs v, x]
# Порівняльний графік функції та сплайн-інтерполяції з програми
x = [3; 5; 7; 9; 11]
y = [1.10255; 3.40421; 1.87923; 3.80378; 2.49575]
b := [1.81539; -0.17828; 0.06276; 0.52658]
c := [0; -0.99684; 1.11736; -0.88545]
d := [-0.16614; 0.35237; -0.3338; 0.14758]
S1(t) := 1.10255 + 1.81539*(t - 3) + 0*(t - 3)^2 - 0.16614*(t - 3)^3
S2(t) := 3.40421 - 0.17828*(t - 5) - 0.99684*(t - 5)^2 + 0.35237*(t - 5)^3
S3(t) := 1.87923 + 0.06276*(t - 7) + 1.11736*(t - 7)^2 - 0.3338*(t - 7)^3
S4(t) := 3.80378 + 0.52658*(t - 9) - 0.88545*(t - 9)^2 + 0.14758*(t - 9)^3
SGeneral(x) := if(x < 5, S1(x), if(x ≥ 5 and x < 7, S2(x), if(x ≥ 7 and x < 9, S3(x), if(x ≥ 9 and x, S4(x), 10))))
# [plot: f(v), SGeneral(v), f(x) vs v, x]
# Розв’язок інтерполяції сплайнами у Mathcad (із наведенням порівняльних графіків)
x = [3; 5; 7; 9; 11]
y = [1.10255; 3.40421; 1.87923; 3.80378; 2.49575]
MyPlot := cspline(x, y)
MyInterpolation(t) := interp(MyPlot, x, y, t)
# [plot: MyInterpolation(v), f(v), f(x) vs v, x]
|f(x1) - SGeneral(x1)| = 3.70539e-6
|f(x2) - SGeneral(x2)| = 2.05111e-6
|f(x3) - SGeneral(x3)| = 1.58359e-6
|f(x4) - SGeneral(x4)| = 4.42655e-6
|f(x5) - SGeneral(x5)| = 3.10124e-5
|f(5.5) - SGeneral(5.5)| = 0.35852
|f(3.5) - SGeneral(3.5)| = 0.658652
|f(4.5) - SGeneral(4.5)| = 0.433767
|f(6.5) - SGeneral(6.5)| = 0.288938
|f(7.5) - SGeneral(7.5)| = 0.292925
|f(8.5) - SGeneral(8.5)| = 0.234873
|f(9.5) - SGeneral(9.5)| = 0.184043
|f(8.5) - SGeneral(10.5)| = 0.0265118
