# Worksheet setting: ORIGIN = 1
# Задаю початкові значення
zalikova := 9311
group := 93
a5 := 1
a4 := -2
a3 := -4
ORIGIN := 1
variant := 1
α := 9
k := 3
a2 := 0
a1 := 2
a0 := 1
equation(x) := a5*(1 + α)*x^5 + a4*x^4 + a3*x^3 + a2*x^2 + a1*x + k*a0
equationWithVariables(x) := 1*(1 + 9)*x^5 - 2*x^4 - 4*x^3 + 0*x^2 + 2*x + k*1
equationWithNumbers(x) := 10*x^5 - 2*x^4 - 4*x^3 + 2*x + 3
primeEquationWithNumbers(x) := 50*x^4 - 8*x^3 - 12*x^2 + 2
epsilonValue := 0.00001
interval := [-0.8; -0.7]
# Шукаю корінь рівняння
equationRootMathcad := root(equationWithNumbers(x), x, interval[1], interval[2]) = -0.762158
# Рівняння для графічного методу
firstEquationWithNumbers(x) := 10*x^5 - 2*x^4 - 4*x^3
secondEquationWithNumbers(x) := -2*x - 3
# Графіки загалом
# [plot: equationWithNumbers(x), firstEquationWithNumbers(x), secondEquationWithNumbers(x) vs x]
# Графіки з більшим масштабом
# [plot: equationWithNumbers(x), firstEquationWithNumbers(x), secondEquationWithNumbers(x) vs x]
# Вписую корені рівняння з програми
equationRootBisectionProgram := -0.762158203125
equationRootChordsProgram := -0.762157741764
equationRootNewtonProgram := -0.762158816304
# Шукаю різницю між рішенням маткаду та програми
equationRootMathcad = -0.762158
|equationRootBisectionProgram - equationRootMathcad| = 1.55212e-7
|equationRootChordsProgram - equationRootMathcad| = 6.16572e-7
|equationRootNewtonProgram - equationRootMathcad| = 4.57967e-7
# Методи Бісекції, Хорд та Ньютона
Bisection(func, fInter, sInter) :=
    root ← 1
    while |sInter - fInter| > epsilonValue and |equationWithNumbers(root)| > epsilonValue
        root ← (fInter + sInter)/2
        if func(fInter)*func(root) > 0
            fInter ← root
        else
            sInter ← root
    root
equationRootBisectionMathcad := Bisection(equationWithNumbers, interval[1], interval[2]) = -0.762158
Chords(func, fInter, sInter) :=
    root ← 1
    while |sInter - fInter| > epsilonValue and |equationWithNumbers(root)| > epsilonValue
        root ← (fInter*func(sInter) - sInter*func(fInter))/(func(sInter) - func(fInter))
        if func(fInter)*func(root) > 0
            fInter ← root
        else
            sInter ← root
    root
equationRootChordsMathcad := Chords(equationWithNumbers, interval[1], interval[2]) = -0.762158
Newton(func, derFunc, fInter, sInter) :=
    root ← 1
    xPos ← 0
    if derFunc(fInter)*func(fInter) > 0
        xPos ← fInter
    else
        xPos ← sInter
    root ← xPos - func(xPos)/derFunc(xPos)
    while epsilonValue < |func(root)|
        root ← root - func(root)/derFunc(root)
    root
equationRootNewtonMathcad := Newton(equationWithNumbers, primeEquationWithNumbers, interval[1], interval[2]) = -0.762159
# Шукаю різницю між програмним рішенням маткаду та програми
equationRootMathcad = -0.762158
|equationRootMathcad - equationRootBisectionMathcad| = 1.55212e-7
|equationRootMathcad - equationRootChordsMathcad| = 6.16572e-7
|equationRootMathcad - equationRootNewtonMathcad| = 4.57967e-7
|equationRootBisectionProgram - equationRootBisectionMathcad| = 0
|equationRootChordsProgram - equationRootChordsMathcad| = 0
|equationRootNewtonProgram - equationRootNewtonMathcad| = 0
