# Worksheet setting: ORIGIN = 1
# Початкові значення
variant := 9
n := variant - 5 = 4
a := 1 + 0.4*n = 2.6
interval := [0; 4]
k := variant - 5 = 4
b := 1 + 0.4*k = 2.6
h := 0.1
RungeKuttaYs := [
    0; 0.230506465742; 0.414258841269; 0.562936868022; 0.683593134403; 0.781219973982; 0.781219973982; 0.859774258422; 0.922580966183; 0.972486207991
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]
RungeKuttaErrors := [
    0; 0.000000437561509; 0.000000662387270; 0.000000803684329; 0.000000903386957; 0.000000978628499; 0.00276172892593; 0.00221118035348; 0.00175917484224; 0.00139145256145
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]
AdamsYs := [
    0; 0.230506465742; 0.414258841269; 0.562936868022; 0.683617259938; 0.781256359395; 0.859816684305; 0.922626612642; 0.972533941062; 1.01196829712
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]
AdamsErrors := [
    0; 0.000000437561509; 0.000000662387270; 0.000000803684329; 0.000000845607467; 0.000000884746372; 0.000000920282543; 0.000000951127685; 0.000000977186805; 0.000000998748837
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]
Step := [
    0; 0.1; 0.2; 0.3; 0.4; 0.5; 0.6; 0.7; 0.8; 0.9
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]
# Графік Значень
# [plot: RungeKuttaYs, AdamsYs vs Step]
# Графік Похибок
# [plot: RungeKuttaErrors, AdamsErrors vs Step]
# ЗДР
ORIGIN := 0
y0 := [0.1; 0]
D(x, y) := [y[1]; -y[0] - (variant - 10)/10*y[1]]
M := 80
u := rkfixed(y0, 0, 40, M, D) = [
    0, 0.1, 0;
    0.5, 0.0875495, -0.0491357;
    1, 0.052506, -0.0884504;
    1.5, 0.00250801, -0.107583;
    2, -0.0506659, -0.100707;
    2.5, -0.0938408, -0.0682216;
    3, -0.115678, -0.0169705;
    3.5, -0.109614, 0.0411479;
    4, -0.0757485, 0.0919063;
    4.5, -0.0211586, 0.122199
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]
# Графік y0 | Фазовий портрет системи
# [plot: u[:, 1] vs u[:, 0]]
# [plot: u[:, 2] vs u[:, 1]]
# Наше рівняння
y0 := [0.1; 0]
D(x, y) := [y[1]; e^(-a*x)*(y[1]^2 + b)]
M := 40
u := rkfixed(y0, 0, 4, M, D)
u[:, 2] = [
    0; 0.230506; 0.414259; 0.562937; 0.683593; 0.78122; 0.859774; 0.922581; 0.972486; 1.01192
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]
RungeKuttaYs = [
    0; 0.230506; 0.414259; 0.562937; 0.683593; 0.78122; 0.78122; 0.859774; 0.922581; 0.972486
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]
AdamsYs = [
    0; 0.230506; 0.414259; 0.562937; 0.683617; 0.781256; 0.859817; 0.922627; 0.972534; 1.01197
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]
# [plot: RungeKuttaYs, AdamsYs, u[:, 2] vs Step]
